# OpenSim document version 40000
ScaleTool scaleSaul:
  mass: 70.92923 [kg]
  height: -1
  age: -1
  ModelScaler:
    apply: true
    scaling_order: measurements
    time_range: 0.2 0.21
    preserve_mass_distribution: false
    MeasurementSet:
      Measurement thorax_x: apply=true
        MarkerPair: markers=(C7 Sternum)
        MarkerPair: markers=(PX T8)
        BodyScale thorax: axes=X
      Measurement thorax_y: apply=true
        MarkerPair: markers=(C7 T8)
        MarkerPair: markers=(Sternum PX)
        BodyScale thorax: axes=Y
      Measurement thorax_z: apply=true
        MarkerPair: markers=(r_AMC2 l_AMC2)
        BodyScale thorax: axes=Z
      Measurement clavicle_r: apply=true
        MarkerPair: markers=(Sternum r_AMC2)
        BodyScale clavicle_r: axes=(X Y Z)
        BodyScale clavphant_r: axes=(X Y Z)
      Measurement scapula_r_y: apply=true
        MarkerPair: markers=(ai_r ts_r)
        BodyScale scapula_r: axes=Y
        BodyScale scapphant_r: axes=Y
      Measurement humerus_r_y: apply=true
        MarkerPair: markers=(r_AMC2 r_elbow_lateral)
        MarkerPair: markers=(r_AMC2 r_elbow_medial)
        BodyScale humphant_r: axes=Y
        BodyScale humphant1_r: axes=Y
        BodyScale humerus_r: axes=Y
      Measurement ulna_r: apply=true
        MarkerPair: markers=(r_elbow_medial r_wrist_ulna)
        BodyScale ulna_r: axes=(X Y Z)
      Measurement radius_r: apply=true
        MarkerPair: markers=(r_elbow_lateral r_wrist_radius)
        BodyScale radius_r: axes=(X Y Z)
      Measurement clavicle_l: apply=true
        MarkerPair: markers=(Sternum l_AMC2)
        BodyScale clavicle_l: axes=(X Y Z)
        BodyScale clavphant_l: axes=(X Y Z)
      Measurement scapula_l_y: apply=true
        MarkerPair: markers=(ai_l ts_l)
        BodyScale scapula_l: axes=Y
        BodyScale scapphant_l: axes=Y
      Measurement humerus_l_y: apply=true
        MarkerPair: markers=(l_AMC2 l_elbow_lateral)
        MarkerPair: markers=(l_AMC2 l_elbow_medial)
        BodyScale humphant_l: axes=Y
        BodyScale humphant1_l: axes=Y
        BodyScale humerus_l: axes=Y
      Measurement ulna_l: apply=true
        MarkerPair: markers=(l_elbow_medial l_wrist_ulna)
        BodyScale ulna_l: axes=(X Y Z)
      Measurement radius_l: apply=true
        MarkerPair: markers=(l_elbow_lateral l_wrist_radius)
        BodyScale radius_l: axes=(X Y Z)
      Measurement scapula_r_z: apply=true
        MarkerPair: markers=(ts_r aa_r)
        BodyScale scapula_r: axes=Z
        BodyScale scapphant_r: axes=Z
      Measurement scapula_l_z: apply=true
        MarkerPair: markers=(ts_l aa_l)
        BodyScale scapula_l: axes=Z
        BodyScale scapphant_l: axes=Z
      Measurement humerus_r_xz: apply=true
        MarkerPair: markers=(r_elbow_lateral r_elbow_medial)
        BodyScale humphant_r: axes=(X Z)
        BodyScale humphant1_r: axes=(X Z)
        BodyScale humerus_r: axes=(X Z)
      Measurement humerus_l_xz: apply=true
        MarkerPair: markers=(l_elbow_lateral l_elbow_medial)
        BodyScale humphant_l: axes=(X Z)
        BodyScale humphant1_l: axes=(X Z)
        BodyScale humerus_l: axes=(X Z)
      Measurement scapula_r_x: apply=true
        MarkerPair: markers=(ts_r aa_r)
        MarkerPair: markers=(aa_r ai_r)
        BodyScale scapula_r: axes=X
        BodyScale scapphant_r: axes=X
      Measurement scapula_l_x: apply=true
        MarkerPair: markers=(ts_l aa_l)
        MarkerPair: markers=(aa_l ai_l)
        BodyScale scapula_l: axes=X
        BodyScale scapphant_l: axes=X
      Measurement proximal_row_r_x: apply=true
        MarkerPair: markers=(r_wrist_ulna r_wrist_radius)
        BodyScale proximal_row_r: axes=X
      Measurement proximal_row_l_x: apply=true
        MarkerPair: markers=(l_wrist_ulna l_wrist_radius)
        BodyScale proximal_row_l: axes=X
      Measurement hand_r_x: apply=true
        MarkerPair: markers=(r_MCP_1 r_MCP_3)
        BodyScale hand_r: axes=X
      Measurement hand_l_x: apply=true
        MarkerPair: markers=(l_MCP_1 l_MCP_3)
        BodyScale hand_l: axes=X
      Measurement hand_proximalrow_r_yz: apply=true
        MarkerPair: markers=(r_wrist_radius r_MCP_1)
        MarkerPair: markers=(r_wrist_ulna r_MCP_3)
        BodyScale proximal_row_r: axes=(Y Z)
        BodyScale hand_r: axes=(Y Z)
      Measurement hand_proximalrow_l_yz: apply=true
        MarkerPair: markers=(l_wrist_radius l_MCP_1)
        MarkerPair: markers=(l_wrist_ulna l_MCP_3)
        BodyScale proximal_row_l: axes=(Y Z)
        BodyScale hand_l: axes=(Y Z)
  MarkerPlacer:
    apply: true
    time_range: 0.2 0.21
    max_marker_movement: -1
    IKTaskSet:
      IKMarkerTask C7: apply=true weight=10
      IKMarkerTask Sternum: apply=true weight=10
      IKMarkerTask PX: apply=true weight=10
      IKMarkerTask T8: apply=true weight=10
      IKMarkerTask ai_r: apply=false weight=1
      IKMarkerTask ai_l: apply=false weight=1
      IKMarkerTask ts_r: apply=false weight=1
      IKMarkerTask ts_l: apply=false weight=1
      IKMarkerTask aa_r: apply=false weight=1
      IKMarkerTask aa_l: apply=false weight=1
      IKMarkerTask r_AMC2: apply=true weight=1
      IKMarkerTask l_AMC2: apply=true weight=1
      IKMarkerTask r_elbow_lateral: apply=true weight=1
      IKMarkerTask l_elbow_lateral: apply=true weight=1
      IKMarkerTask r_elbow_medial: apply=true weight=1
      IKMarkerTask l_elbow_medial: apply=true weight=1
      IKMarkerTask r_wrist_ulna: apply=true weight=1
      IKMarkerTask l_wrist_ulna: apply=true weight=1
      IKMarkerTask r_wrist_radius: apply=true weight=1
      IKMarkerTask l_wrist_radius: apply=true weight=1
      IKMarkerTask r_MCP_1: apply=true weight=1
      IKMarkerTask l_MCP_1: apply=true weight=1
      IKMarkerTask r_MCP_3: apply=true weight=1
      IKMarkerTask l_MCP_3: apply=true weight=1
